// COMSOL Multiphysics 6.3.0.335 model "1. 3D_trina_hemholtz_model_pipes_fab_FYend_ecoflex_large_themvisco_NeckDual_Al_quarter_c6240_large.mph"
// Outline of the model tree

Parameters
  res_radius = 0.07[m]  // Resonator Radius
  res_height = 0.08[m]  // Resonator Height
  match_height = 0.002[m]  // Ecoflex coating thickness
  air_h = 0.02[m]
  mic_rad = 0.008[m]
  mic_h = 0.015[m]
  freq_min = 20
  freq_max = 100
  a = 0.0015[m]  // Neck radius
  L = 0.04[m]  // Neck Length
  water_h = 0.005[m]
  ellipisity = 1
  inlet_offset = per_offset*res_radius
  per_offset = 0
  wall_t = 0.006[m]  // Wall thickness
  eco_sos = 972  // ecoflex speed 972
  eco_den = 1063  // Ecoflex density 1063
  disp = res_radius-a-0.001
  wall_tu = 0.0025[m]
  biga = 0  // big neck additional

Variables
  var1 "Variables 1"
    Vol = intop1(1)
    p_avg = intop1(abs(p)/Vol)
    air_ratio = intop3(1)/intop2(1)
    p_m = intop1(abs(ta.p_t))

Selections
  sel1: Explicit on boundaries 9, 21, 30-32, 34, 35, 41, 43, 44, 46-49, 53-65, 70, 72, 74-83, 88, 90-94, 96, 97, 99-102, 104, 109, 111, 113-116
  sel2: Explicit on boundaries 6, 9, 21, 30-32, 34, 35, 41, 43, 46, 50, 53-58, 60, 63-65, 70, 72, 75-77, 79-83, 88, 94, 96, 99-102, 104, 109, 111, 113
  sel3: Explicit "Walls" on boundaries 6, 9, 21, 24, 30-32, 34, 35, 37, 41-44, 46, 50, 53-58, 60, 63-67, 70-73, 75-85, 88, 89, 91, 94-96, 99-102, 104, 105, 109-111, 113

Couplings
  intop1: Integration on domains 4, 5
  intop2: Integration on domains 1, 2, 4, 5, 7-11, 13, 15, 18, 19, 22, 23
  intop3: Integration on no domains

Probes
  dom1: Domain "Domain Probe 1" on domains 5
    type = maximum
    expr = ta.absp_t
    unit = Pa
    descr = Absolute total acoustic pressure
    table = tbl1

Geometry
  geom1 "Geometry 1" (3D, length unit m)
    cyl1: Cylinder "Resonator" | r = res_radius+wall_t; h = res_height+wall_t*2; pos = {0, 0, -wall_t}
    cyl2: Cylinder "Silicone" | r = res_radius+wall_t; h = match_height; pos = {0, 0, res_height+wall_t}
    wp1: WorkPlane (disabled) | quickplane = yz; quickx = res_radius-air_h; unite = on
    pard1: PartitionDomains (disabled) | domain = cyl1(1) domains 1; workplane = wp1
    cyl5: Cylinder "res_interior" | r = res_radius; h = res_height
    wp2: WorkPlane | quickz = air_h; unite = on
    pard2: PartitionDomains | domain = cyl5(1) domains 1; workplane = wp2
    cyl3: Cylinder "Neck" | r = a; h = L+wall_t; pos = {0, 0, res_height-L}
    cyl6: Cylinder "Neck 1" | r = a+wall_tu; h = L; pos = {0, 0, res_height-L}
    wp3: WorkPlane (disabled) | quickz = air_h-0.0001; unite = on
    blk1: Block "Air" | size = {res_radius*3, res_radius*3, res_height*1.5}; base = center; pos = {0, 0, res_height/2}
    mov1: Move | input = cyl3(1), cyl6(1); disply = disp; displz = 0
    cyl7: Cylinder (disabled) | r = a; h = a*2; pos = {0, res_radius-wall_tu/2, res_height-L+a}; axistype = y
    dif1: Difference | input = cyl1; input2 = pard2; keepadd = on; keepsubtract = on; keep = true
    sph1: Sphere "Microphone" | r = mic_rad; pos = {0, 0, mic_h}
    uni1: Union | input = cyl7, mov1(1); intbnd = off; face = all
    rt1: RigidTransform | input = mov1(2), uni1; keep = on; rot = 30
    rt4: RigidTransform | input = mov1(2), uni1; keep = on; rot = 60
    rt2: RigidTransform | input = mov1(2), rt1, rt4, uni1; keep = on; rot = 90
    rt3: RigidTransform (disabled) | input = mov1(2), rt1, rt2, uni1; keep = on; rot = 180
    cyl8: Cylinder "Neck 2" | r = a+biga; h = L+wall_t; pos = {0, 0, res_height-L}
    cyl9: Cylinder "Neck 1.1" | r = a+wall_tu+biga; h = L; pos = {0, 0, res_height-L}
    mov2: Move | input = cyl8, cyl9; disply = -disp; displz = 0
    rt5: RigidTransform | input = mov2; keep = on; rot = 30
    rt6: RigidTransform | input = mov2, rt5; keep = on; rot = 60
    rt7: RigidTransform | input = rt6; keep = on; rot = 60
    blk2: Block | size = {0.15, 0.3, 0.3}; pos = {-0.15, -0.15, -0.1}
    blk3: Block | size = {0.3, 0.15, 0.3}; pos = {-0.15, -0.15, -0.1}
    dif2: Difference
      input = blk1, cyl1, cyl2, dif1, mov1(2), mov2, pard2, rt1, rt2, rt4, rt5, rt6, rt7, sph1, uni1
      input2 = blk2, blk3
    fin: Finalize "Form Union"

Materials
  mat2: Common "Air" on all domains
    def: def "Basic"
      thermalexpansioncoefficient = alpha_p(pA,T)
      molarmass = 0.02897[kg/mol]
      bulkviscosity = muB(T)
      relpermeability = 1
      relpermittivity = 1
      dynamicviscosity = eta(T)
      ratioofspecificheat = 1.4
      electricconductivity = 0[S/m]
      heatcapacity = Cp(T)
      density = 1.2
      thermalconductivity = k(T)
      soundspeed = 343
      eta: Piecewise | arg = T; pieces = {200.0, 1600.0, -8.38278E-7+8.35717342E-8*T^1-7.69429583E-11*T^2+4.6437266E-14*T^3-1.06585607E-17*T^4}; argunit = K; fununit = Pa*s
      Cp: Piecewise | arg = T; pieces = {200.0, 1600.0, 1047.63657-0.372589265*T^1+9.45304214E-4*T^2-6.02409443E-7*T^3+1.2858961E-10*T^4}; argunit = K; fununit = J/(kg*K)
      rho: Analytic | expr = pA*0.02897/R_const[K*mol/J]/T; args = {pA, T}; fununit = kg/m^3; argunit = {Pa, K}
      k: Piecewise | arg = T; pieces = {200.0, 1600.0, -0.00227583562+1.15480022E-4*T^1-7.90252856E-8*T^2+4.11702505E-11*T^3-7.43864331E-15*T^4}; argunit = K; fununit = W/(m*K)
      cs: Analytic | expr = sqrt(1.4*R_const[K*mol/J]/0.02897*T); args = T; fununit = m/s; argunit = K
      an1: Analytic | funcname = alpha_p; expr = -1/rho(pA,T)*d(rho(pA,T),T); args = {pA, T}; fununit = 1/K; argunit = {Pa, K}
      an2: Analytic "Analytic 2a" | funcname = muB; expr = 0.6*eta(T); args = T; fununit = Pa*s; argunit = K
    RefractiveIndex: RefractiveIndex
      n = 1
      ki = 0
    NonlinearModel: NonlinearModel
      BA = (def.gamma+1)/2
    idealGas: idealGas
      Rs = R_const/Mn
      heatcapacity = Cp(T)
      ratioofspecificheat = 1.4
      molarmass = 0.02897
      Cp: Piecewise | arg = T; pieces = {200.0, 1600.0, 1047.63657-0.372589265*T^1+9.45304214E-4*T^2-6.02409443E-7*T^3+1.2858961E-10*T^4}; argunit = K; fununit = J/(kg*K)
  mat6: Common "Al 6061-t6" on domains 2, 8, 11-13, 16, 19, 20, 23
    def: def "Basic"
      Syfunccomp = Syfunccomp_2000_s_tested_at_293K_1(epe)[Pa]
      density = 2700
      soundspeed = 6240
      thermalconductivity = 167
      heatcapacity = 896
      dynamicviscosity = 10^24
      bulkviscosity = 10^24
      ratioofspecificheat = 1
      Syfunccomp_2000_s_tested_at_293K_1: Piecewise | arg = epe; pieces = {0.0, 0.24, 8.673081E8+1.139969E9*epe^1-9.742601E9*epe^2+4.160122E10*epe^3-6.344428E10*epe^4}
  mat4: Common "EcoFlex" on no domains
    def: def "Basic"
      thermalexpansioncoefficient = alpha_p(T)
      bulkviscosity = muB(T)
      dynamicviscosity = eta(T)
      ratioofspecificheat = gamma_w(T)
      electricconductivity = 5.5e-6[S/m]
      heatcapacity = Cp(T)
      density = eco_den
      thermalconductivity = k(T)
      soundspeed = eco_sos
      eta: Piecewise
        arg = T
        pieces = 
          {273.15, 413.15, 1.3799566804-0.021224019151*T^1+1.3604562827E-4*T^2-4.6454090319E-7*T^3+8.9042735735E-10*T^4-9.0790692686E-13*T^5+3.8457331488E-16*T^6}
          {413.15, 553.75, 0.00401235783-2.10746715E-5*T^1+3.85772275E-8*T^2-2.39730284E-11*T^3}
        argunit = K
        fununit = Pa*s
      Cp: Piecewise | arg = T; pieces = {273.15, 553.75, 12010.1471-80.4072879*T^1+0.309866854*T^2-5.38186884E-4*T^3+3.62536437E-7*T^4}; argunit = K; fununit = J/(kg*K)
      rho: Piecewise
        arg = T
        smooth = contd1
        pieces = 
          {273.15, 293.15, 6.3092789034e-05*T^3-0.0603676398829*T^2+18.9229382407066*T-950.704055329848}
          {293.15, 373.15, 1.0335053319e-05*T^3-0.0133950656345*T^2+4.96928883266*T+432.257114008512}
        argunit = K
        fununit = kg/m^3
      k: Piecewise | arg = T; pieces = {273.15, 553.75, -0.869083936+0.00894880345*T^1-1.58366345E-5*T^2+7.97543259E-9*T^3}; argunit = K; fununit = W/(m*K)
      cs: Interpolation
        funcnametable = {cs, 1}
        table = {{273, 1403}, {278, 1427}, {283, 1447}, {293, 1481}, {303, 1507}, {313, 1526}, {323, 1541}, {333, 1552}, {343, 1555}, {353, 1555}, {363, 1550}, {373, 1543}}
        interp = piecewisecubic
        fununit = m/s
        argunit = K
      an1: Analytic | funcname = alpha_p; expr = -1/rho(T)*d(rho(T),T); args = T; fununit = 1/K; argunit = K
      an2: Analytic | funcname = gamma_w; expr = 1+(T/Cp(T))*(alpha_p(T)*cs(T))^2; args = T; fununit = 1; argunit = K
      an3: Analytic | funcname = muB; expr = 2.79*eta(T); args = T; fununit = Pa*s; argunit = K

Physics
  ta: ThermoacousticsSinglePhysics "Thermoviscous Acoustics, Frequency Domain" on all domains
    dependent variable p2
    tam1: ThermoviscousAcousticsModel (default)
    wall1: Wall (default)
    init1: init "Initial Values 1" (default)
    ni1: Impedance "Normal Impedance 1" on boundaries 3, 52, 118 | Z0 = 1.2[kg/m^3]*343[m/s]
    pra1: PressureAdiabatic on boundaries 26 | pbnd = 1
    sym1: Symmetry on boundaries 1, 2, 4, 5, 7, 8, 10, 11, 13, 14, 16, 17, 19, 20, 22, 23, 29, 33, 36, 40, 45, 98, 103, 106, 112, 117

Mesh
  mesh1 "Mesh 1"
    size: MeshSizeDefault | hmax = 0.018; hmin = 0.00336; hcurve = 0.7; hnarrow = 0.4; hgrad = 1.6; hauto = 6
    ftet1: FreeTet "Free Tetrahedral 1" on remaining entities | optcurved = on
  mesh2 "Mesh 2"
    ftet1: FreeTet "Free Tetrahedral 1" on remaining entities | optcurved = on
  mesh3 "Mesh 3"
    size: MeshSizeDefault | hauto = 4
    size1: Size on domains 1, 3, 6 | hmax = 0.0168*3; hauto = 4; custom = on
    ftet1: FreeTet "Free Tetrahedral 1" on remaining entities
    bl1: BndLayer "Boundary Layers 1" on entire geometry
      blp: BndLayerProp "Boundary Layer Properties" on selection sel3 | blnlayers = 2; blstretch = 1.4

Studies
  std1 "Study 1"
    param: Parametric "Parametric Sweep" (disabled) | pname = L; plistarr = 0.055,0.03; punit = m
    freq: Frequency "Frequency Domain" | plist = range(20,2,160); mesh = {geom1, mesh3}

Solver configurations
  sol1 "Solution 1" (study std1)
    v1: Variables "Dependent Variables 1"
    s1: Stationary "Stationary Solver 1"
      p1: Parametric | pname = freq; plistarr = range(20,2,160); punit = Hz; pcontinuationmode = no
      fc1: FullyCoupled | linsolver = d1
      d1: Direct "Suggested Direct Solver (ta)" | linsolver = pardiso; pivotperturb = 1.0E-13

Datasets
  dset1: Solution | solution = sol1
  dset2: Solution "Probe Solution 2" | solution = sol1
  max1: Maximum "Domain Probe 1" on domains 5 | data = dset2

Derived values
  pev1: EvalPoint "Domain Probe 1" | data = max1; table = tbl1; expr = ta.absp_t

Plots
  pg9: PlotGroup1D "Probe Plot Group 9" | data = none
    tblp1: Table "Probe Table Graph 1" | table = tbl1
  pg10: PlotGroup3D "Acoustic Pressure (ta)" | data = dset1
    mslc1: Multislice | expr = ta.p_t
  pg11: PlotGroup3D "Acoustic Velocity (ta)" | data = dset1
    slc1: Slice | expr = 10*log10(ta.p_t); quickxnumber = 1
  pg12: PlotGroup3D "Temperature Variation (ta)" | data = dset1
    mslc1: Multislice | expr = ta.T_t

Exports
  plot1: Plot | filename = C:\Users\249181\Desktop\mesh1.csv